<?xml version="1.0" encoding="UTF-8"?>
<neuroml xmlns="http://www.neuroml.org/schema/neuroml2" xmlns:xsi="http://www.w3.org/2001/XMLSchema-instance" xsi:schemaLocation="http://www.neuroml.org/schema/neuroml2  https://raw.githubusercontent.com/NeuroML/NeuroML2/development/Schemas/NeuroML2/NeuroML_v2beta4.xsd" id="network_GranCellLayer">

    <notes>

Network structure (NeuroML 2beta4) for project: GranCellLayer saved with neuroConstruct v1.7.1 on: 14:47:41, 21-Mar-16

Cell Group: Golgis contains 4 cells
Cell Group: Grans contains 75 cells
Cell Group: Mossies contains 12 cells

Network connection: NetConn_Golgis_Grans contains 75 individual synaptic connections
Network connection: NetConn_Mossies_Grans contains 300 individual synaptic connections
Network connection: NetConn_Grans_Golgis contains 300 individual synaptic connections

    </notes>

    <include href="AMPA_GranGol.synapse.nml"/>
    <include href="GABAA.synapse.nml"/>
    <include href="Golgi_98.cell.nml"/>
    <include href="Golgi_CaHVA_CML.channel.nml"/>
    <include href="Golgi_CaPool_CML.nml"/>
    <include href="Golgi_H_CML.channel.nml"/>
    <include href="Golgi_KA_CML.channel.nml"/>
    <include href="Golgi_KCa_CML.channel.nml"/>
    <include href="Golgi_KDr_CML.channel.nml"/>
    <include href="Golgi_NaF_CML.channel.nml"/>
    <include href="GolgiPassiveCond.channel.nml"/>
    <include href="Gran_CaHVA_98.channel.nml"/>
    <include href="Gran_CaPool_98.nml"/>
    <include href="Gran_H_98.channel.nml"/>
    <include href="Gran_KA_98.channel.nml"/>
    <include href="Gran_KCa_98.channel.nml"/>
    <include href="Gran_KDr_98.channel.nml"/>
    <include href="Gran_NaF_98.channel.nml"/>
    <include href="GranPassiveCond.channel.nml"/>
    <include href="Granule_98.cell.nml"/>
    <include href="MF_AMPA.synapse.nml"/>
    <include href="MFFastLeakCond.channel.nml"/>
    <include href="MFSpikeSyn.synapse.nml"/>
    <include href="MossyFiber.cell.nml"/>
    <include href="NMDA.synapse.nml"/>
    <poissonFiringSynapse id="Input_0" averageRate="0.05 per_ms" synapse="MFSpikeSyn" spikeTarget="./MFSpikeSyn"/>

    <network id="network_GranCellLayer" type="networkWithTemperature" temperature="32.0 degC">

        <property tag="recommended_dt_ms" value="0.01"/>
        <property tag="recommended_duration_ms" value="1000"/>

        <population id="Golgis" component="Golgi_98" type="populationList" size="4">
            <instance id="0">
                <location x="0.0" y="100.0" z="0.0"/>
            </instance>
            <instance id="1">
                <location x="300.0" y="100.0" z="0.0"/>
            </instance>
            <instance id="2">
                <location x="600.0" y="100.0" z="0.0"/>
            </instance>
            <instance id="3">
                <location x="900.0" y="100.0" z="0.0"/>
            </instance>
        </population>

        <!--
        <population id="Grans" component="Granule_98" type="populationList" size="75">
           <annotation>
                <property tag="color" value="0.59765625 0.3984375 0.0"/>
            </annotation>
            <instance id="0">
                <location x="0.0" y="50.0" z="0.0"/>
            </instance>
            <instance id="1">
                <location x="12.162162" y="50.0" z="0.0"/>
            </instance>
            <instance id="2">
                <location x="24.324324" y="50.0" z="0.0"/>
            </instance>
            <instance id="3">
                <location x="36.486485" y="50.0" z="0.0"/>
            </instance>
            <instance id="4">
                <location x="48.648647" y="50.0" z="0.0"/>
            </instance>
            <instance id="5">
                <location x="60.81081" y="50.0" z="0.0"/>
            </instance>
            <instance id="6">
                <location x="72.97297" y="50.0" z="0.0"/>
            </instance>
            <instance id="7">
                <location x="85.13513" y="50.0" z="0.0"/>
            </instance>
            <instance id="8">
                <location x="97.297295" y="50.0" z="0.0"/>
            </instance>
            <instance id="9">
                <location x="109.45946" y="50.0" z="0.0"/>
            </instance>
            <instance id="10">
                <location x="121.62162" y="50.0" z="0.0"/>
            </instance>
            <instance id="11">
                <location x="133.78378" y="50.0" z="0.0"/>
            </instance>
            <instance id="12">
                <location x="145.94594" y="50.0" z="0.0"/>
            </instance>
            <instance id="13">
                <location x="158.10811" y="50.0" z="0.0"/>
            </instance>
            <instance id="14">
                <location x="170.27026" y="50.0" z="0.0"/>
            </instance>
            <instance id="15">
                <location x="182.43243" y="50.0" z="0.0"/>
            </instance>
            <instance id="16">
                <location x="194.59459" y="50.0" z="0.0"/>
            </instance>
            <instance id="17">
                <location x="206.75674" y="50.0" z="0.0"/>
            </instance>
            <instance id="18">
                <location x="218.91891" y="50.0" z="0.0"/>
            </instance>
            <instance id="19">
                <location x="231.08107" y="50.0" z="0.0"/>
            </instance>
            <instance id="20">
                <location x="243.24324" y="50.0" z="0.0"/>
            </instance>
            <instance id="21">
                <location x="255.4054" y="50.0" z="0.0"/>
            </instance>
            <instance id="22">
                <location x="267.56757" y="50.0" z="0.0"/>
            </instance>
            <instance id="23">
                <location x="279.72974" y="50.0" z="0.0"/>
            </instance>
            <instance id="24">
                <location x="291.89188" y="50.0" z="0.0"/>
            </instance>
            <instance id="25">
                <location x="304.05405" y="50.0" z="0.0"/>
            </instance>
            <instance id="26">
                <location x="316.21622" y="50.0" z="0.0"/>
            </instance>
            <instance id="27">
                <location x="328.37836" y="50.0" z="0.0"/>
            </instance>
            <instance id="28">
                <location x="340.54053" y="50.0" z="0.0"/>
            </instance>
            <instance id="29">
                <location x="352.7027" y="50.0" z="0.0"/>
            </instance>
            <instance id="30">
                <location x="364.86487" y="50.0" z="0.0"/>
            </instance>
            <instance id="31">
                <location x="377.027" y="50.0" z="0.0"/>
            </instance>
            <instance id="32">
                <location x="389.18918" y="50.0" z="0.0"/>
            </instance>
            <instance id="33">
                <location x="401.35135" y="50.0" z="0.0"/>
            </instance>
            <instance id="34">
                <location x="413.5135" y="50.0" z="0.0"/>
            </instance>
            <instance id="35">
                <location x="425.67566" y="50.0" z="0.0"/>
            </instance>
            <instance id="36">
                <location x="437.83783" y="50.0" z="0.0"/>
            </instance>
            <instance id="37">
                <location x="450.0" y="50.0" z="0.0"/>
            </instance>
            <instance id="38">
                <location x="462.16214" y="50.0" z="0.0"/>
            </instance>
            <instance id="39">
                <location x="474.3243" y="50.0" z="0.0"/>
            </instance>
            <instance id="40">
                <location x="486.48648" y="50.0" z="0.0"/>
            </instance>
            <instance id="41">
                <location x="498.64862" y="50.0" z="0.0"/>
            </instance>
            <instance id="42">
                <location x="510.8108" y="50.0" z="0.0"/>
            </instance>
            <instance id="43">
                <location x="522.97296" y="50.0" z="0.0"/>
            </instance>
            <instance id="44">
                <location x="535.13513" y="50.0" z="0.0"/>
            </instance>
            <instance id="45">
                <location x="547.2973" y="50.0" z="0.0"/>
            </instance>
            <instance id="46">
                <location x="559.4595" y="50.0" z="0.0"/>
            </instance>
            <instance id="47">
                <location x="571.6216" y="50.0" z="0.0"/>
            </instance>
            <instance id="48">
                <location x="583.78375" y="50.0" z="0.0"/>
            </instance>
            <instance id="49">
                <location x="595.9459" y="50.0" z="0.0"/>
            </instance>
            <instance id="50">
                <location x="608.1081" y="50.0" z="0.0"/>
            </instance>
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            -->
    </network>

</neuroml>
